Simulations: Version=100
  Simulation
    Clock: Start=1990-01-01; End=2000-12-31
    Summary SummaryFile
    Weather: FileName=%root%\Examples\WeatherFiles\Dalby.met
    SoilArbitrator Soil Arbitrator
    Zone Field: Area=1; Slope=0; AspectAngle=0; Altitude=50
      Report: EventNames=[Maize].Harvesting
        VariableNames:
          [Clock].Today
          [Maize].Phenology.CurrentStageName
          [Maize].AboveGround.Wt
          [Maize].AboveGround.N
          [Maize].Grain.Wt
          [Maize].Grain.Size
          [Maize].Grain.NumberFunction
          [Maize].Grain.N
          [Maize].Total.Wt
      Fertiliser
      Soil SoilType =  silty clay loam: SoilType=SoilType =  silty clay loam; State=California; Country=United States; ApsoilNumber=0; Latitude=39.2167; Longitude=-121.633
        DataSource=Original source is www.isric.org. See: https://www.isric.org/explore/soilgrids/faq-soilgrids  2023-05-18 14:41:41.220952
        Comments=resolution = 250m - taxonomic classification name = silty clay loam - drainage class = NA - elevation = NA - slope = NA - geomdesc = NA
        Physical
          Thickness  ParticleSizeClay  ParticleSizeSand  ParticleSizeSilt  BD    AirDry     LL15      DUL       SAT       KS
          50         26.6              29.3              44.1              1.43  0.0811405  0.162281  0.306788  0.417118  374.426
          100        26.1              28.9              45                1.6   0.158652   0.158652  0.304728  0.4148    375.381
          150        28.3              28.5              43.2              1.63  0.171166   0.171166  0.315555  0.420125  316.911
          300        28.9              28.7              42.4              1.64  0.174569   0.174569  0.317984  0.421349  304.466
          400        29.6              28.1              42.3              1.65  0.178587   0.178587  0.322276  0.4236    286.077
          1000       25.6              31.2              43.2              1.63  0.155248   0.155248  0.29778   0.41111   407.355
          SoilCrop MaizeSoil
            LL=[0.162281, 0.158652, 0.171166, 0.174569, 0.178587, 0.155248]
            KL=[0.06, 0.0491238, 0.0402192, 0.0329287, 0.0269597, 0.0220728]
            XF=[1, 1, 1, 1, 1, 1]
          SoilCrop SoybeanSoil
            LL=[0.162281, 0.158652, 0.171166, 0.174569, 0.178587, 0.155248]
            KL=[0.06, 0.0491238, 0.0402192, 0.0329287, 0.0269597, 0.0220728]
            XF=[1, 1, 1, 1, 1, 1]
          SoilCrop WheatSoil
            LL=[0.162281, 0.158652, 0.171166, 0.174569, 0.178587, 0.155248]
            KL=[0.06, 0.0491238, 0.0402192, 0.0329287, 0.0269597, 0.0220728]
            XF=[1, 1, 1, 1, 1, 1]
        WaterBalance SoilWater: SummerDate=1-Nov; SummerU=5; SummerCona=5; WinterDate=1-Apr; WinterU=5; WinterCona=5; DiffusConst=40; DiffusSlope=16; Salb=0.12; CN2Bare=73; CNRed=20; CNCov=0.8; Thickness=[50, 100, 150, 300, 400, 1000]; SWCON=[0.5, 0.5, 0.5, 0.5, 0.5, 0.5]
        Organic: FOMCNRatio=40
          Thickness  Carbon  SoilCNRatio  FBiom      FInert    FOM
          50         4.97    12           0.04       0.8       150
          100        1.9     12           0.0327492  0.80804   122.81
          150        1.01    12           0.0268128  0.816161  100.548
          300        0.8     12           0.0219525  0.824364  82.3217
          400        0.6     12           0.0179732  0.832649  67.3993
          1000       0.51    12           0.0147152  0.841017  55.1819
        Chemical
          Thickness  NO3N      NH4N       PH
          50         0.5       0.05       6.5
          100        0.495025  0.0495025  6.6
          150        0.490099  0.0490099  6.6
          300        0.485223  0.0485223  6.8
          400        0.480395  0.0480395  7.1
          1000       0.475615  0.0475615  7.1
        InitialWater: PercentMethod=1; FractionFull=1
        Sample InitialN: Thickness=[150, 150, 300, 300, 300, 300, 300]; SWUnits=Volumetric; OCUnits=Total; PHUnits=Water
        CERESSoilTemperature
        Nutrient
      SurfaceOrganicMatter: InitialResidueName=wheat_stubble; InitialResidueType=wheat; InitialResidueMass=500; InitialStandingFraction=0; InitialCPR=0; InitialCNR=100
      Plant Maize
      MicroClimate: a_interception=0; b_interception=1; c_interception=0; d_interception=0; soil_albedo=0.3; SoilHeatFluxFraction=0.4; MinimumHeightDiffForNewLayer=0; NightInterceptionFraction=0.5; ReferenceHeight=2
      Manager SowingFertiliser
        Amount = 160
        CropName = maize
```csharp
using Models.PMF;
using Models.Core;
using System;
namespace Models
{
    [Serializable]
    public class Script : Model
    {
        [Link] Clock Clock;
        [Link] Fertiliser Fertiliser;
        [Link] Summary Summary;
        
        
        [Description("Amount of fertiliser to be applied (kg/ha)")]
        public double Amount { get; set; }
        
        [Description("Crop to be fertilised")]
        public string CropName { get; set; }
        
        
        

        [EventSubscribe("Sowing")]
        private void OnSowing(object sender, EventArgs e)
        {
            Model crop = sender as Model;
            if (crop.Name.ToLower() == CropName.ToLower())
                Fertiliser.Apply(Amount: Amount, Type: Fertiliser.Types.NO3N);
        }
        
    }
}
```
      Manager SowingRule
        StartDate = 1-nov
        EndDate = 10-jan
        MinESW = 100
        MinRain = 25
        RainDays = 7
        CultivarName = Dekalb_XL82
        SowingDepth = 30
        RowSpacing = 750
        Population = 6
```csharp
using APSIM.Shared.Utilities;
using Models.Utilities;
using Models.Soils.Nutrients;
using Models.Soils;
using Models.PMF;
using Models.Core;
using System;

namespace Models
{
    [Serializable]
    public class Script : Model
    {
        [Link] Clock Clock;
        [Link] Fertiliser Fertiliser;
        [Link] Summary Summary;
        [Link(ByName = true)] Plant Maize;
        [Link] Soil Soil;
        Accumulator accumulatedRain;
        
        [Description("Start of sowing window (d-mmm)")]
        public string StartDate { get; set; }
        [Description("End of sowing window (d-mmm)")]
        public string EndDate { get; set; }
        [Description("Minimum extractable soil water for sowing (mm)")]
        public double MinESW { get; set; }
        [Description("Accumulated rainfall required for sowing (mm)")]
        public double MinRain { get; set; }
        [Description("Duration of rainfall accumulation (d)")]
        public int RainDays { get; set; }
        [Description("Cultivar to be sown")]
        [Display(Type=DisplayType.CultivarName, PlantName = "Maize")]
        public string CultivarName { get; set; }
        [Description("Sowing depth (mm)")]
        public double SowingDepth { get; set; }
        [Description("Row spacing (mm)")]
        public double RowSpacing { get; set; }
        [Description("Plant population (/m2)")]
        public double Population { get; set; }
        
        
        [EventSubscribe("StartOfSimulation")]
        private void OnSimulationCommencing(object sender, EventArgs e)
        {
            accumulatedRain = new Accumulator(this, "[Weather].Rain", RainDays);
        }
        

        [EventSubscribe("DoManagement")]
        private void OnDoManagement(object sender, EventArgs e)
        {
            accumulatedRain.Update();
            
            if (DateUtilities.WithinDates(StartDate, Clock.Today, EndDate) &&
                !Maize.IsAlive &&
                MathUtilities.Sum(Soil.SoilWater.ESW) > MinESW &&
                accumulatedRain.Sum > MinRain)
            {
                Maize.Sow(population: Population, cultivar: CultivarName, depth: SowingDepth, rowSpacing: RowSpacing);    
            }
        
        }
        
    }
}
```
      Manager Harvesting
```csharp
using APSIM.Shared.Utilities;
using System.Xml.Serialization;
using Models;
using Models.PMF;
using Models.Soils.Nutrients;
using Models.Soils;
using System.Text;
using System.Collections.Generic;
using Models.Core;
using System;

namespace Models
{
    [Serializable] 
    public class Script : Model
    {
        [Link(ByName = true)] Plant Maize;
        [Link] Zone zone;
                    
        
        [EventSubscribe("StartOfSimulation")]
        private void OnSimulationCommencing(object sender, EventArgs e)
        {
        }
        
        [EventSubscribe("DoManagement")]
        private void OnDoManagement(object sender, EventArgs e)
        {
            if (Maize.Phenology.CurrentPhaseName == "ReadyForHarvesting")
            {
                Maize.Harvest();
                Maize.EndCrop();
            }
        }
        
        [EventSubscribe("DoManagementCalculations")]
        private void OnDoManagementCalculations(object sender, EventArgs e)
        {
            
        }
    }
}
```
  DataStore
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